Mon Apr 27 17:54:00 CEST 2026
$PROBLEM
$INPUT      ID TIME DV AMT GROUP MODEL DOSE
$DATA      warfarin.csv IGNORE=@
$SUBROUTINE ADVAN2 TRANS2
$PK
  CL = THETA(1) * EXP(ETA(1))
  VC = THETA(2) * EXP(ETA(2))
  KA = THETA(3) * EXP(ETA(3))
  V = VC

$ERROR
  CONC = A(2)/VC
  Y = CONC + CONC * EPS(1)

$ESTIMATION METHOD=COND INTERACTION MAXEVAL=9999 POSTHOC
$COVARIANCE
$THETA  (0,0.15) ; POP_CL
$THETA  (0,8) ; POP_VC
$THETA  (0,1) ; POP_KA
$OMEGA  0.07  ;     IIV_CL
$OMEGA  0.02  ;     IIV_VC
$OMEGA  0.6  ;     IIV_KA
$SIGMA  0.01  ;   RUV_PROP
$TABLE      ID VC CL KA ETA(1) ETA(2) ETA(3) FILE=sdtab1 NOAPPEND
            NOPRINT

NM-TRAN MESSAGES
 WARNINGS AND ERRORS (IF ANY) FOR PROBLEM    1
 (WARNING  2) NM-TRAN INFERS THAT THE DATA ARE POPULATION.
 (WARNING  23) $PK DOES NOT DEFINE A SCALE PARAMETER FOR THE CENTRAL
 COMPARTMENT.  WITH THIS TRANS, IT MAY NOT BE POSSIBLE TO SEPARATELY
 OBTAIN ESTIMATES OF PARAMETERS AFFECTING CLEARANCE AND VOLUME.
Note: Analytical 2nd Derivatives are constructed in FSUBS but are never used.
      You may insert $ABBR DERIV2=NO after the first $PROB to save FSUBS construction and compilation time

1NONLINEAR MIXED EFFECTS MODEL PROGRAM (NONMEM) VERSION 7.6.0 (nm760)
 ORIGINALLY DEVELOPED BY STUART BEAL, LEWIS SHEINER, AND ALISON BOECKMANN
 CURRENT DEVELOPERS ARE ROBERT BAUER, ICON DEVELOPMENT SOLUTIONS,
 AND ALISON BOECKMANN. IMPLEMENTATION, EFFICIENCY, AND STANDARDIZATION
 PERFORMED BY NOUS INFOSYSTEMS.
 PROBLEM NO.:         1

 TOT. NO. OF OBS RECS:      256
 TOT. NO. OF INDIVIDUALS:       32
 ONE COMPARTMENT MODEL WITH FIRST-ORDER ABSORPTION (ADVAN2)
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 #TBLN:      1
 #METH: First Order Conditional Estimation with Interaction
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
 #TERM:
0MINIMIZATION SUCCESSFUL
 NO. OF FUNCTION EVALUATIONS USED:      135
 NO. OF SIG. DIGITS IN FINAL EST.:  3.7

 ETABAR IS THE ARITHMETIC MEAN OF THE ETA-ESTIMATES,
 AND THE P-VALUE IS GIVEN FOR THE NULL HYPOTHESIS THAT THE TRUE MEAN IS 0.

 ETABAR:         6.3039E-04 -4.6536E-03 -2.1291E-02
 SE:             4.3806E-02  1.6292E-02  1.5140E-01
 N:                      32          32          32

 P VAL.:         9.8852E-01  7.7516E-01  8.8816E-01

 ETASHRINKSD(%)  2.0790E+00  1.5141E+01  4.4559E+00
 ETASHRINKVR(%)  4.1147E+00  2.7990E+01  8.7133E+00
 EBVSHRINKSD(%)  1.6458E+00  1.5078E+01  1.9401E+00
 EBVSHRINKVR(%)  3.2645E+00  2.7882E+01  3.8425E+00
 RELATIVEINF(%)  9.6602E+01  7.1705E+01  9.5730E+01
 EPSSHRINKSD(%)  1.7317E+01
 EPSSHRINKVR(%)  3.1635E+01


 TOTAL DATA POINTS NORMALLY DISTRIBUTED (N):          256
 N*LOG(2PI) CONSTANT TO OBJECTIVE FUNCTION:    470.49652900079241
 OBJECTIVE FUNCTION VALUE WITHOUT CONSTANT:    41.863968578781495
 OBJECTIVE FUNCTION VALUE WITH CONSTANT:       512.36049757957392
 REPORTED OBJECTIVE FUNCTION DOES NOT CONTAIN CONSTANT

 TOTAL EFFECTIVE ETAS (NIND*NETA):                            96


 #TERE:
 Elapsed estimation  time in seconds:     0.14
 Elapsed covariance  time in seconds:     0.11
 Elapsed postprocess time in seconds:     0.00

 ********************               FIRST ORDER CONDITIONAL ESTIMATION WITH INTERACTION              ********************
 #OBJT:**************                       MINIMUM VALUE OF OBJECTIVE FUNCTION                      ********************
 #OBJV:********************************************            41.864       *********************************************

 ********************               FIRST ORDER CONDITIONAL ESTIMATION WITH INTERACTION              ********************
 ********************                             FINAL PARAMETER ESTIMATE                           ********************

 THETA - VECTOR OF FIXED EFFECTS PARAMETERS   *********
         TH 1      TH 2      TH 3
         1.49E-01  8.54E+00  9.13E-01

 OMEGA - COV MATRIX FOR RANDOM EFFECTS - ETAS  ********
         ETA1      ETA2      ETA3
 ETA1
+        6.40E-02
 ETA2
+        0.00E+00  1.18E-02
 ETA3
+        0.00E+00  0.00E+00  8.04E-01

 SIGMA - COV MATRIX FOR RANDOM EFFECTS - EPSILONS  ****
         EPS1
 EPS1
+        1.06E-02

 OMEGA - CORR MATRIX FOR RANDOM EFFECTS - ETAS  *******
         ETA1      ETA2      ETA3
 ETA1
+        2.53E-01
 ETA2
+        0.00E+00  1.09E-01
 ETA3
+        0.00E+00  0.00E+00  8.97E-01

 SIGMA - CORR MATRIX FOR RANDOM EFFECTS - EPSILONS  ***
         EPS1
 EPS1
+        1.03E-01

 ********************               FIRST ORDER CONDITIONAL ESTIMATION WITH INTERACTION              ********************
 ********************                            STANDARD ERROR OF ESTIMATE                          ********************

 THETA - VECTOR OF FIXED EFFECTS PARAMETERS   *********
         TH 1      TH 2      TH 3
         6.82E-03  1.95E-01  1.52E-01

 OMEGA - COV MATRIX FOR RANDOM EFFECTS - ETAS  ********
         ETA1      ETA2      ETA3
 ETA1
+        1.72E-02
 ETA2
+       .........  4.58E-03
 ETA3
+       ......... .........  1.94E-01

 SIGMA - COV MATRIX FOR RANDOM EFFECTS - EPSILONS  ****
         EPS1
 EPS1
+        9.56E-04

 OMEGA - CORR MATRIX FOR RANDOM EFFECTS - ETAS  *******
         ETA1      ETA2      ETA3
 ETA1
+        3.39E-02
 ETA2
+       .........  2.11E-02
 ETA3
+       ......... .........  1.08E-01

 SIGMA - CORR MATRIX FOR RANDOM EFFECTS - EPSILONS  ***
         EPS1
 EPS1
+        4.64E-03

 ********************               FIRST ORDER CONDITIONAL ESTIMATION WITH INTERACTION              ********************
 ********************                          COVARIANCE MATRIX OF ESTIMATE                         ********************

            TH 1      TH 2      TH 3      OM11      OM12      OM13      OM22      OM23      OM33      SG11
 TH 1
+        4.65E-05
 TH 2
+        2.09E-04  3.80E-02
 TH 3
+       -1.42E-04  3.23E-03  2.31E-02
 OM11
+       -2.75E-05 -1.25E-03 -5.03E-05  2.95E-04
 OM12
+       ......... ......... ......... ......... .........
 OM13
+       ......... ......... ......... ......... ......... .........
 OM22
+        4.89E-07  3.25E-04  8.45E-05 -8.36E-06 ......... .........  2.10E-05
 OM23
+       ......... ......... ......... ......... ......... ......... ......... .........
 OM33
+       -5.82E-05 -6.92E-04  9.59E-03 -2.24E-04 ......... .........  6.49E-05 .........  3.77E-02
 SG11
+        2.73E-07 -4.55E-06 -5.26E-05  1.82E-06 ......... ......... -8.18E-07 .........  4.14E-06  9.13E-07

 ********************               FIRST ORDER CONDITIONAL ESTIMATION WITH INTERACTION              ********************
 ********************                          CORRELATION MATRIX OF ESTIMATE                        ********************

            TH 1      TH 2      TH 3      OM11      OM12      OM13      OM22      OM23      OM33      SG11
 TH 1
+        6.82E-03
 TH 2
+        1.57E-01  1.95E-01
 TH 3
+       -1.37E-01  1.09E-01  1.52E-01
 OM11
+       -2.35E-01 -3.72E-01 -1.93E-02  1.72E-02
 OM12
+       ......... ......... ......... ......... .........
 OM13
+       ......... ......... ......... ......... ......... .........
 OM22
+        1.56E-02  3.64E-01  1.22E-01 -1.06E-01 ......... .........  4.58E-03
 OM23
+       ......... ......... ......... ......... ......... ......... ......... .........
 OM33
+       -4.39E-02 -1.83E-02  3.25E-01 -6.72E-02 ......... .........  7.30E-02 .........  1.94E-01
 SG11
+        4.19E-02 -2.44E-02 -3.62E-01  1.11E-01 ......... ......... -1.87E-01 .........  2.23E-02  9.56E-04
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 Elapsed finaloutput time in seconds:     0.00
 #CPUT: Total CPU Time in Seconds,        0.288
