$PROBLEM
$INPUT ID TIME DV AMT GROUP MODEL DOSE
$DATA ../compare_poped_with_nonmem_data/warfarin.csv IGNORE=@
$SUBROUTINES ADVAN2  TRANS2
$PK
  CL = THETA(1) * EXP(ETA(1))
  VC = THETA(2) * EXP(ETA(2))
  KA = THETA(3) * EXP(ETA(3))
  V = VC

$ERROR
  CONC = A(2)/VC
  Y = CONC + CONC * EPS(1)

$ESTIMATION METHOD=COND INTERACTION MAXEVAL=9999 POSTHOC
$COVARIANCE

$THETA (0, 0.15) ; POP_CL
$THETA (0, 8) ; POP_VC
$THETA (0, 1) ; POP_KA

$OMEGA 0.07 ; IIV_CL
$OMEGA 0.02 ; IIV_VC
$OMEGA 0.6 ; IIV_KA

$SIGMA 0.01; RUV_PROP

$TABLE ID VC CL KA ETA(1) ETA(2) ETA(3) FILE=sdtab1 NOAPPEND NOPRINT
